*********************************************************************
** Abaqus/fromAnsys 6.14-1
**
** reading Ansys data from: C:\Users\jarvis\OneDrive - posgrad.ufsc.br\Universidade\UFSC\Dissertacao\CEOS\VisualStudio_Intel\VisualStudio_Intel\confined_3d_mesh_quarter_d2xh2_ref2_11000.cdb
**   creating Abaqus input: C:\Users\jarvis\OneDrive - posgrad.ufsc.br\Universidade\UFSC\Dissertacao\CEOS\VisualStudio_Intel\VisualStudio_Intel\confined_3d_mesh_quarter_d2xh2_ref2_11000.inp
**  writing diagnostics to: C:\Users\jarvis\OneDrive - posgrad.ufsc.br\Universidade\UFSC\Dissertacao\CEOS\VisualStudio_Intel\VisualStudio_Intel\confined_3d_mesh_quarter_d2xh2_ref2_11000.log
**
** Ansys Commands processed:
**      command   number
** ------------   ------
**            D     5081
**       EBLOCK        1
**           ET        1
**       MPTEMP        1
**       NBLOCK        1
** Ansys Commands NOT processed:
**      command   number
** ------------   ------
**        *ELSE        1
**       *ENDIF        1
**       FINISH        1
**          *IF        1
**            N        1
**       NUMOFF        4
**       /PREP7        1
**         TYPE        1
**
*HEADING
**
** ---------------------------------------------------
** ---- *NODE ----------------------------------------
** ---------------------------------------------------
**
*SYSTEM
**
*NODE, SYSTEM=R
      1, 0, 0, 0.0592
      2, 0, 0, 0.176
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*ELEMENT, TYPE=C3D20R, ELSET=ES2_M1_E1_R0
1, 11289,11281,11280,11288,11210,11207,11208,11209,8229,8199,8225,8230,8009,8002,8006,8010,8227,8197,8195,8223
2, 11210,11207,11208,11209,11206,11203,11204,11205,8009,8002,8006,8010,7994,7987,7991,7995,8008,7998,8001,8005
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**
*NSET, NSET=NS_BOUNDARY_3
1,2,3,4,5,6
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*NSET, NSET=NS_BOUNDARY_4
1,2,3,4,5,6
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*NSET, NSET=NS_BOUNDARY_5
25,74,123,172,221,270
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*NSET, NSET=NS_BOUNDARY_6
8013,8015,8017,8019,8021,8023
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**
** ---------------------------------------------------
** ---- *MATERIAL ------------------------------------
** ---------------------------------------------------
**
** ---------------------------------------------------
*STEP, NAME=STEP-1
*STATIC
**
**
** BOUNDARY CONDITIONS
**
*BOUNDARY
NS_BOUNDARY_3,  2,  2, 0
**
*BOUNDARY
NS_BOUNDARY_4,  1,  1, 0
**
*BOUNDARY
NS_BOUNDARY_5,  3,  3, 0
**
*BOUNDARY
NS_BOUNDARY_6,  3,  3, 0
**
**
*END STEP
